// COMSOL Multiphysics 6.2.0.290 model "curve_fitting_v62.mph"
// Outline of the model tree

Functions
  int1: Interpolation
    funcs = {D, 1}
    funcname = D
    table = 
      {0, -0.165077316}
      {0.02, -0.134469628}
      {0.04, -0.135348346}
      {0.06, -0.132817159}
      {0.08, -0.117104578}
      {0.1, -0.130816562}
      {0.12, -0.090343859}
      {0.14, -0.096695053}
      {0.16, -0.090061651}
      {0.18, -0.081661082}
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    defvars = on

Variables
  var1 "Variables 1"
    F = c0*(1-x)^3+c1*x*(1-x)^2+c2*x^2*(1-x)+c3*x^3
    R = intop1((D-F)^2)

Couplings
  intop1: Integration on all domains

Geometry
  geom1 "Geometry 1" (1D, length unit m)
    i1: Interval | coord = 0, 1
    pt1: Point
      p = {0, 0.02, 0.04, 0.06, 0.08, 0.1, 0.12, 0.14, 0.16, 0.18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}
      pid = {0, 1, 2, 3, 4, 5, 6, 7, 8, 9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}
    fin: Finalize "Form Union"

Physics
  ge: GlobalEquations "Global ODEs and DAEs"
    ge1: GlobalEquations
      name = {c0, c1, c2, c3}
      equation = {d(R,c0), d(R,c1), d(R,c2), d(R,c3)}
      initialValueU = {0, 0, 0, 1}
      initialValueUt = {0, 0, 0, 0}
      description = {, , , }
      valueType = complex
      DependentVariableQuantity = dimensionless
      CustomDependentVariableUnit = m
      SourceTermQuantity = dimensionless
      CustomSourceTermUnit = m
      fieldName = ODE1

Mesh
  mesh1 "Mesh 1"
    size: MeshSizeDefault | hmax = 0.067; hmin = 3.0E-4; hcurve = 0.3; hgrad = 1.3
    edg1: Edge on remaining entities
      dis1: Distribution on all domains | numelem = 1

Studies
  std1 "Study 1"
    stat: Stationary

Solver configurations
  sol1 "Solution 1" (study std1)
    v1: Variables "Dependent Variables 1"
    s1: Stationary "Stationary Solver 1"
      dDef: Direct
      fc1: FullyCoupled | linsolver = dDef

Datasets
  dset1: Solution | solution = sol1

Derived values
  gev1: EvalGlobal "State variable c0" | data = dset1; table = tbl1; expr = c0; descr = State variable c0
  gev2: EvalGlobal "State variable c1" | data = dset1; table = tbl2; expr = c1; descr = State variable c1
  gev3: EvalGlobal "State variable c2" | data = dset1; table = tbl3; expr = c2; descr = State variable c2
  gev4: EvalGlobal "State variable c3" | data = dset1; table = tbl4; expr = c3; descr = State variable c3
  gev5: EvalGlobal "State variable c3.2" | data = dset1; table = tbl4; expr = c4; descr = State variable c4

Tables
  tbl1: Table
    // State variable c0 (c0)
    State variable c0
    1.63026
  tbl2: Table
    // State variable c1 (c1)
    State variable c1
    -2.04266
  tbl3: Table
    // State variable c2 (c2)
    State variable c2
    -0.972571
  tbl4: Table
    // State variable c3 (c3)
    State variable c3 | State variable c4
    0.760686 | -0.757835

Plots
  pg1: PlotGroup1D "1D Plot Group 1" | data = dset1
    lngr2: LineGraph on all domains | expr = D; xdata = expr; xdataexpr = x
    lngr3: LineGraph on all domains | expr = D; xdata = expr; xdataexpr = x
    lngr1: LineGraph on all domains | expr = F; xdata = expr; xdataexpr = x
  pg2: PlotGroup1D "1D Plot Group 2" | data = dset1
    lngr2: LineGraph on all domains | expr = D; xdata = expr; xdataexpr = x